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/batch
! ANSYS input file written by Workbench version 2024 R1
! File used for geometry attach: C:\Users\colle\Documents\GitHub\MAE150\h6\p2_files\dp0\SYS\DM\SYS.agdb
/title,p2--Static Structural (A5)
/COM,/COM,     ANSYSMotion, 2024.1
/com,--- Data in consistent MKS units. See Solving Units in the help system for more information.
/units,MKS
/prep7
! Turn off shape checking because checks already performed inside WB mesher.
! See help system for more information.
SHPP,OFF,,NOWARN
etcon,set             ! allow ANSYS to choose best KEYOP's for 180x elements, resets any applicable keyopt to MAPDL defaults
/com,*********** Nodes for the whole assembly ***********
nblock,3,,7
(1i9,3e20.9e3)
        1     8.000000000E+00     0.000000000E+00     0.000000000E+00
        2     1.200000000E+01     0.000000000E+00     0.000000000E+00
        3     0.000000000E+00     0.000000000E+00     0.000000000E+00
        4     4.000000000E+00     0.000000000E+00     0.000000000E+00
        5     1.000000000E+01     0.000000000E+00     4.000000000E+00
        6     2.000000000E+00     0.000000000E+00     4.000000000E+00
        7     6.000000000E+00     0.000000000E+00     4.000000000E+00
-1
/com,*********** Elements for Body 1 "Line Body" ***********
et,1,188
keyo,1,3,2
eblock,19,solid,,3
(19i9)
        1        1        1        1        0        0        0        0        3        0        1        1        2        5
        1        1        1        1        0        0        0        0        3        0        2        3        4        6
        1        1        1        1        0        0        0        0        3        0        3        4        1        7
-1
/com,*********** Send User Defined Coordinate System(s) ***********
csys,0
toffst,273.15,  ! Temperature offset from absolute zero
/com,*********** Set Reference Temperature ***********
tref,22.
/com,*********** Send Materials ***********
MP,EX,1,200000000000,	! Pa
MP,NUXY,1,0.3,

/com,*********** Send Beam Properties ***********
SECTYPE,1,BEAM,RECT
SECDATA,0.3,0.3
secoffset,cent

!************************* Model Summary ********************
!Line Body,	new steel,	matid,	1
!************************* End Model Summary ********************
/com,*********** Fixed Supports ***********
CMBLOCK,_FIXEDSU,NODE,        1
(8i10)
         3
cmsel,s,_FIXEDSU
d,all,all
nsel,all
/com,*********** Define Line Pressure Vector Using Surface Effect Elements ***********
local,12,0,0.,0.,0.,0.,0.,0.
csys,0
et,2,156
mat,2
keyop,2,5,1         !  No orientation node
eblock,10,,,2
(15i9)
        4        2        2        2       12        3        4
        5        2        2        2       12        4        1
-1
esel,s,type,,2
keyop,2,2,1                ! Apply load in local coordinate system
esel,all
/com,*********** Create Direct FE , Forces ****
CMBLOCK,_CM44F  ,NODE,        1
(8i10)
         2
/com,*********** Create Direct FE , Forces ****
CMBLOCK,_CM46F  ,NODE,        1
(8i10)
         4
/com,*********** Create Direct FE , Forces ****
CMBLOCK,_CM48F  ,NODE,        1
(8i10)
         1
fini
/com,****************************************************************************
/com,*************************    SOLUTION       ********************************
/com,****************************************************************************
/solu
antype,0                   ! static analysis
_thickRatio=  0     ! Ratio of thick parts in the model
eqsl,sparse,,,,,1
cntr,print,1               ! print out contact info and also make no initial contact an error
cncheck,dmp		!	Enable program controlled contact splitting for distributed memory parallel run
dmpoption,emat,no             ! Don't combine emat file for DANSYS
dmpoption,esav,no             ! Don't combine esav file for DANSYS
nldiag,cont,iter           ! print out contact info each equilibrium iteration
rescontrol,,none                 ! Do not keep any restart files
/com,****************************************************
/com,******************* SOLVE FOR LS 1 OF 1 ****************
esel,s,type,,2
nsle
sfe,all,1,pres,1,1.
sfe,all,2,pres,1,-100.
sfe,all,3,pres,1,0.
nsel,all
esel,all
/com,**** Set Direct FE , Forces ****
f,_CM44F,fx,0.
f,_CM44F,fy,-2000.
f,_CM44F,fz,0.
/com,**** Set Direct FE , Forces ****
f,_CM46F,fx,0.
f,_CM46F,fy,-1000.
f,_CM46F,fz,0.
/com,**** Set Direct FE , Forces ****
f,_CM48F,fx,0.
f,_CM48F,fy,500.
f,_CM48F,fz,0.
nsub,1,1,1
time,1.
outres,erase
outres,all,none
outres,nsol,all,
outres,rsol,all
outres,eangl,all
outres,etmp,all
outres,veng,all
outres,nload,all,
outres,strs,all,
outres,epel,all,
outres,eppl,all,
outres,cont,all,
esel,s,type,,1
cm,_elmisc,elem
esel,all
outres,misc,all,_elmisc
! *********** WB SOLVE COMMAND ***********
! check interactive state
*get,ANSINTER_,active,,int
*if,ANSINTER_,ne,0,then
/eof
*endif
solve
/com *************** Write FE CONNECTORS *********
CEWRITE,file,ce,,INTE
/com,****************************************************
/com,*************** FINISHED SOLVE FOR LS 1 *************
*get,_NSOLTHREADS,active,0,ntfs
*get,_NSOLPROCESSES,active,0,npfs
/post1
fini
